// COMSOL Multiphysics 5.2.0.220 model "asymmetric supercapacitor carbonized tungsten oxide electrode_updated.mph"
// Outline of the model tree

Parameters
  h_cap = 500[um]  // h_cap is the height of that stack
  l_c = 170[um]  // thickness of our electrod, cathode and anodes
  l_a = 150[um]  // asymmetric supercapacitors have different cathode and anodes length
  l_e = 100[um]  // sandwiched between 2 electrods-> we will have electrolyte = 10 micro meter
  r_in = 0.1[mm]  // inner redius = exist symmetric like cylindrical thing
  sigma_a = 0.01[S/m]  // Electrical conductivity of electrods anodes made of carbon based materials (Siemens/meter)
  sigma_c = 0.001[S/m]  // Electrical conductivity of electrods cathode made of carbon based materials (Siemens/meter)
  sigma_e = 6.5[S/m]  // Electrical conductivity of electrolyte (Siemens/meter)

Geometry
  geom1 "Geometry 1" (2D axisymmetric, length unit m)
    r1: Rectangle | pos = {r_in, 0}; size = {l_c, h_cap}
    r2: Rectangle | pos = {r_in+l_c, 0}; size = {l_e, h_cap}
    r3: Rectangle | pos = {r_in+l_c+r_in, 0}; size = {l_a, h_cap}
    fin: Finalize "Form Union"

Materials
  mat1: Common "Material Electrolyte" on domains 2
    ElectrolyteConductivity
      sigmal = sigma_e
  mat2: Common "Material Electrods" on domains 1, 3
    def "Basic"
      electricconductivity = sigma_c
    ElectrolyteConductivity
      sigmal = sigma_e

Physics
  siec: SecondaryCurrentDistribution on all domains
    dependent variable phil
    ice1: Electrolyte (default)
    axi1: AxialSymmetry (default)
    ins1: Insulation (default)
    init1: init "Initial Values 1" (default)
    pce1: PorousElectrode on domains 1, 3 | epsl = 0.25; epss = 0.75
      pdl1: PorousMatrixDoubleLayerCapacitance on all domains | Cdl = 0.13[F/m^2]; av_dl = 1.9e9[1/m]
    egnd1: ElectricGround on boundaries 10
    pot1: ElectricPotential on boundaries 1

Mesh
  mesh1 "Mesh 1" (physics-controlled)
    size: MeshSizeDefault | hauto = 5

Studies
  std1 "Study 1"
    time: Transient "Time Dependent" | tlist = range(0,0.25,20)
    frlin: Frequencylinearized "Frequency-Domain Perturbation" (disabled) | punit = Hz

Solver configurations
  sol1 "Solution 1" (study std1)
    v1: Variables "Dependent Variables 1"
    t1: Time "Time-Dependent Solver 1" | tlist = range(0,0.25,20)
      fc1: FullyCoupled | linsolver = d1; dtech = auto; initstep = 1; minstep = 1.0E-4; maxiter = 5
      d1: Direct | linsolver = mumps

Datasets
  dset1: Solution | solution = sol1
  rev1: Revolve2D "Revolution 2D 1" | data = dset1; genpoints = {{0, 0}, {0, 1}}; startangle = -90; revangle = 225

Plots
  pg1: PlotGroup2D "Electrolyte Potential (siec)" | data = dset1
    surf1: Surface | expr = phil
  pg2: PlotGroup3D "Electrolyte Potential, 3D (siec)" | data = rev1
    surf1: Surface | expr = phil
    vol1: Volume | expr = phil